*HEADING
ex16 drift-diffusion UEL (Scharfetter-Gummel 1969)
*USER ELEMENT, NODES=2, TYPE=U1, PROPERTIES=2, COORDINATES=1, VARIABLES=1, UNSYMM
1,2,3
*NODE
1, -2.0000000000
2, -1.9800000000
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*ELEMENT, TYPE=U1, ELSET=EALL
1, 1, 2
2, 2, 3
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*UEL PROPERTY, ELSET=EALL
100.0, 100.0
*NSET, NSET=NALL, GENERATE
1, 201, 1
*STEP, INC=200, UNSYMM=YES
*STATIC, DIRECT
0.05, 1.0
*CONTROLS, PARAMETERS=FIELD
1e-6, 1e-6,,,,,,
*BOUNDARY
1, 1, 1, -4.605270170991699
1, 2, 2, 0.009999000199947261
1, 3, 3, 100.00999900022748
201, 1, 1, 4.605270170991424
201, 2, 2, 100.00999900019994
201, 3, 3, 0.009999000199950016
*NODE PRINT, NSET=NALL, FREQUENCY=1
U
*END STEP
*STEP, INC=200, UNSYMM=YES
*STATIC, DIRECT
0.1, 1.0
*CONTROLS, PARAMETERS=FIELD
1e-6, 1e-6,,,,,,
*BOUNDARY
1, 1, 1, 5.394729829008301
*NODE PRINT, NSET=NALL, FREQUENCY=1
U
*END STEP
