*HEADING
ex21 Al line electromigration (Korhonen model UEL)
*USER ELEMENT, NODES=2, TYPE=U1, PROPERTIES=1, COORDINATES=1, VARIABLES=1, UNSYMM
1,2
*NODE
1, 0.0000000000e+00
2, 2.5000000000e-04
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*ELEMENT, TYPE=U1, ELSET=ELINE
1, 1, 2
2, 2, 3
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*UEL PROPERTY, ELSET=ELINE
5.000000e-09
*NSET, NSET=NA
1
*NSET, NSET=NC
81
*NSET, NSET=NALL, GENERATE
1, 81, 1
*AMPLITUDE, NAME=INST, TIME=TOTAL TIME
0., 1., 1e9, 1.
*STEP, INC=400, UNSYMM=YES
*STATIC
1.111111e+02, 2.222222e+03, 1.100000e+02, 1.111111e+02
*BOUNDARY, AMPLITUDE=INST
NA, 1, 1, 9.80000000e-03
NC, 1, 1, 0.
*NODE PRINT, NSET=NALL, FREQUENCY=999
U
*END STEP
*STEP, INC=400, UNSYMM=YES
*STATIC
1.111111e+03, 2.000000e+04, 1.100000e+03, 1.111111e+03
*BOUNDARY, AMPLITUDE=INST
NA, 1, 1, 9.80000000e-03
NC, 1, 1, 0.
*NODE PRINT, NSET=NALL, FREQUENCY=9
U
*END STEP
*STEP, INC=400, UNSYMM=YES
*STATIC
5.555556e+03, 8.888889e+04, 5.500000e+03, 5.555556e+03
*BOUNDARY, AMPLITUDE=INST
NA, 1, 1, 9.80000000e-03
NC, 1, 1, 0.
*NODE PRINT, NSET=NALL, FREQUENCY=8
U
*END STEP
*STEP, INC=400, UNSYMM=YES
*STATIC
1.000000e+05, 2.000000e+06, 9.900000e+04, 1.000000e+05
*BOUNDARY, AMPLITUDE=INST
NA, 1, 1, 9.80000000e-03
NC, 1, 1, 0.
*NODE PRINT, NSET=NALL, FREQUENCY=999
U
*END STEP
