*HEADING
ex23 junctionless trigate MuGFET (Lee 2009) Lg=30nm
*USER ELEMENT, NODES=8, TYPE=U1, PROPERTIES=2, COORDINATES=3, VARIABLES=1, UNSYMM
1,2,3
*NODE
1, 0.00000000e+00, -2.00000000e-07, -2.00000000e-07
2, 2.00000000e-07, -2.00000000e-07, -2.00000000e-07
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*ELEMENT, TYPE=U1, ELSET=ESI
7601, 8161, 8162, 8213, 8212, 9130, 9131, 9182, 9181
7602, 8162, 8163, 8214, 8213, 9131, 9132, 9183, 9182
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*ELEMENT, TYPE=U1, ELSET=EOX
1, 1, 2, 53, 52, 970, 971, 1022, 1021
2, 2, 3, 54, 53, 971, 972, 1023, 1022
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*UEL PROPERTY, ELSET=ESI
1, 8.000000e+09
*UEL PROPERTY, ELSET=EOX
0, 0.
*NSET, NSET=SRC
8161, 8212, 8263, 8314, 8365, 8416
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*NSET, NSET=DRN
8211, 8262, 8313, 8364, 8415, 8466
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*NSET, NSET=GATE
9, 10, 11, 12, 13, 14
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*NSET, NSET=OXI
1, 2, 3, 4, 5, 6
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*NSET, NSET=SUB
36823, 36824, 36825, 36826, 36827, 36828
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*NSET, NSET=NALL, GENERATE
1, 37791, 1
*AMPLITUDE, NAME=DOPRAMP, TIME=TOTAL TIME
0.000000e+00, 0.00000000e+00
1.000000e-04, 5.96085666e-01
1.467799e-04, 6.12915430e-01
2.154435e-04, 6.29745194e-01
3.162278e-04, 6.46574957e-01
4.641589e-04, 6.63404721e-01
6.812921e-04, 6.80234485e-01
1.000000e-03, 6.97064249e-01
1.467799e-03, 7.13894013e-01
2.154435e-03, 7.30723777e-01
3.162278e-03, 7.47553541e-01
4.641589e-03, 7.64383305e-01
6.812921e-03, 7.81213069e-01
1.000000e-02, 7.98042833e-01
1.467799e-02, 8.14872597e-01
2.154435e-02, 8.31702361e-01
3.162278e-02, 8.48532125e-01
4.641589e-02, 8.65361889e-01
6.812921e-02, 8.82191652e-01
1.000000e-01, 8.99021416e-01
1.467799e-01, 9.15851180e-01
2.154435e-01, 9.32680944e-01
3.162278e-01, 9.49510708e-01
4.641589e-01, 9.66340472e-01
6.812921e-01, 9.83170236e-01
1.000000e+00, 1.00000000e+00
*STEP, INC=400, UNSYMM=YES
*STATIC
0.0001, 1.0, 1e-9, 0.05
*CONTROLS, PARAMETERS=FIELD
1e-5,,,,,,,
*BOUNDARY, AMPLITUDE=DOPRAMP
SRC, 1, 1, 2.28027074e+01
DRN, 1, 1, 2.28027074e+01
GATE, 1, 1, 2.28027074e+01
*BOUNDARY
SRC, 2, 2, 0.
DRN, 2, 2, 1.93423598e+00
OXI, 2, 2, 0.
NALL, 3, 3, 0.
SUB, 1, 1, -3.44294004e+01
*END STEP
*STEP, INC=400, UNSYMM=YES
*STATIC
0.1, 1.0, 1e-9, 0.1
*CONTROLS, PARAMETERS=FIELD
1e-5,,,,,,,
*BOUNDARY
SRC, 1, 1, 2.28027074e+01
DRN, 1, 1, 2.47369434e+01
GATE, 1, 1, -6.53771760e+01
SRC, 2, 2, 0.
DRN, 2, 2, 1.93423598e+00
OXI, 2, 2, 0.
NALL, 3, 3, 0.
SUB, 1, 1, -3.44294004e+01
*NODE PRINT, NSET=DRN, FREQUENCY=999, TOTALS=YES
RF
*END STEP
*STEP, INC=400, UNSYMM=YES
*STATIC
0.25, 1.0, 1e-9, 0.25
*CONTROLS, PARAMETERS=FIELD
1e-5,,,,,,,
*BOUNDARY
SRC, 1, 1, 2.28027074e+01
DRN, 1, 1, 2.47369434e+01
GATE, 1, 1, -6.34429400e+01
SRC, 2, 2, 0.
DRN, 2, 2, 1.93423598e+00
OXI, 2, 2, 0.
NALL, 3, 3, 0.
SUB, 1, 1, -3.44294004e+01
*END STEP
*STEP, INC=400, UNSYMM=YES
*STATIC
0.25, 1.0, 1e-9, 0.25
*CONTROLS, PARAMETERS=FIELD
1e-5,,,,,,,
*BOUNDARY
SRC, 1, 1, 2.28027074e+01
DRN, 1, 1, 2.47369434e+01
GATE, 1, 1, -6.15087041e+01
SRC, 2, 2, 0.
DRN, 2, 2, 1.93423598e+00
OXI, 2, 2, 0.
NALL, 3, 3, 0.
SUB, 1, 1, -3.44294004e+01
*END STEP
*STEP, INC=400, UNSYMM=YES
*STATIC
0.25, 1.0, 1e-9, 0.25
*CONTROLS, PARAMETERS=FIELD
1e-5,,,,,,,
*BOUNDARY
SRC, 1, 1, 2.28027074e+01
DRN, 1, 1, 2.47369434e+01
GATE, 1, 1, -5.95744681e+01
SRC, 2, 2, 0.
DRN, 2, 2, 1.93423598e+00
OXI, 2, 2, 0.
NALL, 3, 3, 0.
SUB, 1, 1, -3.44294004e+01
*END STEP
*STEP, INC=400, UNSYMM=YES
*STATIC
0.25, 1.0, 1e-9, 0.25
*CONTROLS, PARAMETERS=FIELD
1e-5,,,,,,,
*BOUNDARY
SRC, 1, 1, 2.28027074e+01
DRN, 1, 1, 2.47369434e+01
GATE, 1, 1, -5.76402321e+01
SRC, 2, 2, 0.
DRN, 2, 2, 1.93423598e+00
OXI, 2, 2, 0.
NALL, 3, 3, 0.
SUB, 1, 1, -3.44294004e+01
*END STEP
*STEP, INC=400, UNSYMM=YES
*STATIC
0.25, 1.0, 1e-9, 0.25
*CONTROLS, PARAMETERS=FIELD
1e-5,,,,,,,
*BOUNDARY
SRC, 1, 1, 2.28027074e+01
DRN, 1, 1, 2.47369434e+01
GATE, 1, 1, -5.57059961e+01
SRC, 2, 2, 0.
DRN, 2, 2, 1.93423598e+00
OXI, 2, 2, 0.
NALL, 3, 3, 0.
SUB, 1, 1, -3.44294004e+01
*END STEP
*STEP, INC=400, UNSYMM=YES
*STATIC
0.25, 1.0, 1e-9, 0.25
*CONTROLS, PARAMETERS=FIELD
1e-5,,,,,,,
*BOUNDARY
SRC, 1, 1, 2.28027074e+01
DRN, 1, 1, 2.47369434e+01
GATE, 1, 1, -5.37717602e+01
SRC, 2, 2, 0.
DRN, 2, 2, 1.93423598e+00
OXI, 2, 2, 0.
NALL, 3, 3, 0.
SUB, 1, 1, -3.44294004e+01
*END STEP
*STEP, INC=400, UNSYMM=YES
*STATIC
0.25, 1.0, 1e-9, 0.25
*CONTROLS, PARAMETERS=FIELD
1e-5,,,,,,,
*BOUNDARY
SRC, 1, 1, 2.28027074e+01
DRN, 1, 1, 2.47369434e+01
GATE, 1, 1, -5.18375242e+01
SRC, 2, 2, 0.
DRN, 2, 2, 1.93423598e+00
OXI, 2, 2, 0.
NALL, 3, 3, 0.
SUB, 1, 1, -3.44294004e+01
*END STEP
*STEP, INC=400, UNSYMM=YES
*STATIC
0.25, 1.0, 1e-9, 0.25
*CONTROLS, PARAMETERS=FIELD
1e-5,,,,,,,
*BOUNDARY
SRC, 1, 1, 2.28027074e+01
DRN, 1, 1, 2.47369434e+01
GATE, 1, 1, -4.99032882e+01
SRC, 2, 2, 0.
DRN, 2, 2, 1.93423598e+00
OXI, 2, 2, 0.
NALL, 3, 3, 0.
SUB, 1, 1, -3.44294004e+01
*END STEP
*STEP, INC=400, UNSYMM=YES
*STATIC
0.25, 1.0, 1e-9, 0.25
*CONTROLS, PARAMETERS=FIELD
1e-5,,,,,,,
*BOUNDARY
SRC, 1, 1, 2.28027074e+01
DRN, 1, 1, 2.47369434e+01
GATE, 1, 1, -4.79690522e+01
SRC, 2, 2, 0.
DRN, 2, 2, 1.93423598e+00
OXI, 2, 2, 0.
NALL, 3, 3, 0.
SUB, 1, 1, -3.44294004e+01
*END STEP
*STEP, INC=400, UNSYMM=YES
*STATIC
0.25, 1.0, 1e-9, 0.25
*CONTROLS, PARAMETERS=FIELD
1e-5,,,,,,,
*BOUNDARY
SRC, 1, 1, 2.28027074e+01
DRN, 1, 1, 2.47369434e+01
GATE, 1, 1, -4.60348162e+01
SRC, 2, 2, 0.
DRN, 2, 2, 1.93423598e+00
OXI, 2, 2, 0.
NALL, 3, 3, 0.
SUB, 1, 1, -3.44294004e+01
*END STEP
*STEP, INC=400, UNSYMM=YES
*STATIC
0.25, 1.0, 1e-9, 0.25
*CONTROLS, PARAMETERS=FIELD
1e-5,,,,,,,
*BOUNDARY
SRC, 1, 1, 2.28027074e+01
DRN, 1, 1, 2.47369434e+01
GATE, 1, 1, -4.41005803e+01
SRC, 2, 2, 0.
DRN, 2, 2, 1.93423598e+00
OXI, 2, 2, 0.
NALL, 3, 3, 0.
SUB, 1, 1, -3.44294004e+01
*END STEP
*STEP, INC=400, UNSYMM=YES
*STATIC
0.25, 1.0, 1e-9, 0.25
*CONTROLS, PARAMETERS=FIELD
1e-5,,,,,,,
*BOUNDARY
SRC, 1, 1, 2.28027074e+01
DRN, 1, 1, 2.47369434e+01
GATE, 1, 1, -4.21663443e+01
SRC, 2, 2, 0.
DRN, 2, 2, 1.93423598e+00
OXI, 2, 2, 0.
NALL, 3, 3, 0.
SUB, 1, 1, -3.44294004e+01
*END STEP
*STEP, INC=400, UNSYMM=YES
*STATIC
0.25, 1.0, 1e-9, 0.25
*CONTROLS, PARAMETERS=FIELD
1e-5,,,,,,,
*BOUNDARY
SRC, 1, 1, 2.28027074e+01
DRN, 1, 1, 2.47369434e+01
GATE, 1, 1, -4.02321083e+01
SRC, 2, 2, 0.
DRN, 2, 2, 1.93423598e+00
OXI, 2, 2, 0.
NALL, 3, 3, 0.
SUB, 1, 1, -3.44294004e+01
*END STEP
*STEP, INC=400, UNSYMM=YES
*STATIC
0.25, 1.0, 1e-9, 0.25
*CONTROLS, PARAMETERS=FIELD
1e-5,,,,,,,
*BOUNDARY
SRC, 1, 1, 2.28027074e+01
DRN, 1, 1, 2.47369434e+01
GATE, 1, 1, -3.82978723e+01
SRC, 2, 2, 0.
DRN, 2, 2, 1.93423598e+00
OXI, 2, 2, 0.
NALL, 3, 3, 0.
SUB, 1, 1, -3.44294004e+01
*END STEP
*STEP, INC=400, UNSYMM=YES
*STATIC
0.25, 1.0, 1e-9, 0.25
*CONTROLS, PARAMETERS=FIELD
1e-5,,,,,,,
*BOUNDARY
SRC, 1, 1, 2.28027074e+01
DRN, 1, 1, 2.47369434e+01
GATE, 1, 1, -3.63636364e+01
SRC, 2, 2, 0.
DRN, 2, 2, 1.93423598e+00
OXI, 2, 2, 0.
NALL, 3, 3, 0.
SUB, 1, 1, -3.44294004e+01
*END STEP
*STEP, INC=400, UNSYMM=YES
*STATIC
0.25, 1.0, 1e-9, 0.25
*CONTROLS, PARAMETERS=FIELD
1e-5,,,,,,,
*BOUNDARY
SRC, 1, 1, 2.28027074e+01
DRN, 1, 1, 2.47369434e+01
GATE, 1, 1, -3.44294004e+01
SRC, 2, 2, 0.
DRN, 2, 2, 1.93423598e+00
OXI, 2, 2, 0.
NALL, 3, 3, 0.
SUB, 1, 1, -3.44294004e+01
*END STEP
*STEP, INC=400, UNSYMM=YES
*STATIC
0.25, 1.0, 1e-9, 0.25
*CONTROLS, PARAMETERS=FIELD
1e-5,,,,,,,
*BOUNDARY
SRC, 1, 1, 2.28027074e+01
DRN, 1, 1, 2.47369434e+01
GATE, 1, 1, -2.66924565e+01
SRC, 2, 2, 0.
DRN, 2, 2, 1.93423598e+00
OXI, 2, 2, 0.
NALL, 3, 3, 0.
SUB, 1, 1, -3.44294004e+01
*END STEP
*STEP, INC=400, UNSYMM=YES
*STATIC
0.25, 1.0, 1e-9, 0.25
*CONTROLS, PARAMETERS=FIELD
1e-5,,,,,,,
*BOUNDARY
SRC, 1, 1, 2.28027074e+01
DRN, 1, 1, 2.47369434e+01
GATE, 1, 1, -1.12185687e+01
SRC, 2, 2, 0.
DRN, 2, 2, 1.93423598e+00
OXI, 2, 2, 0.
NALL, 3, 3, 0.
SUB, 1, 1, -3.44294004e+01
*END STEP
*STEP, INC=400, UNSYMM=YES
*STATIC
0.25, 1.0, 1e-9, 0.25
*CONTROLS, PARAMETERS=FIELD
1e-5,,,,,,,
*BOUNDARY
SRC, 1, 1, 2.28027074e+01
DRN, 1, 1, 2.47369434e+01
GATE, 1, 1, 4.25531915e+00
SRC, 2, 2, 0.
DRN, 2, 2, 1.93423598e+00
OXI, 2, 2, 0.
NALL, 3, 3, 0.
SUB, 1, 1, -3.44294004e+01
*END STEP
