*HEADING
ex24 DG quantum slab (gamma=0.36)
*USER ELEMENT, NODES=8, TYPE=U1, PROPERTIES=3, COORDINATES=3, VARIABLES=1, UNSYMM
1,2,3,4
*NODE
1, 0.00000000e+00, 0.00000000e+00, 0.00000000e+00
2, 5.00000000e-07, 0.00000000e+00, 0.00000000e+00
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*ELEMENT, TYPE=U1, ELSET=ESI
1, 1, 2, 9, 8, 708, 709, 716, 715
2, 2, 3, 10, 9, 709, 710, 717, 716
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*UEL PROPERTY, ELSET=ESI
1, 8.000000e+09, 0.3600
*NSET, NSET=CONT
1, 7, 8, 14, 15, 21
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*NSET, NSET=WALL
2, 3, 4, 5, 6, 702
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*NSET, NSET=NALL, GENERATE
1, 1414, 1
*AMPLITUDE, NAME=DOPRAMP, TIME=TOTAL TIME
0.000000e+00, 0.00000000e+00
1.000000e-04, 5.96085666e-01
1.467799e-04, 6.12915430e-01
2.154435e-04, 6.29745194e-01
3.162278e-04, 6.46574957e-01
4.641589e-04, 6.63404721e-01
6.812921e-04, 6.80234485e-01
1.000000e-03, 6.97064249e-01
1.467799e-03, 7.13894013e-01
2.154435e-03, 7.30723777e-01
3.162278e-03, 7.47553541e-01
4.641589e-03, 7.64383305e-01
6.812921e-03, 7.81213069e-01
1.000000e-02, 7.98042833e-01
1.467799e-02, 8.14872597e-01
2.154435e-02, 8.31702361e-01
3.162278e-02, 8.48532125e-01
4.641589e-02, 8.65361889e-01
6.812921e-02, 8.82191652e-01
1.000000e-01, 8.99021416e-01
1.467799e-01, 9.15851180e-01
2.154435e-01, 9.32680944e-01
3.162278e-01, 9.49510708e-01
4.641589e-01, 9.66340472e-01
6.812921e-01, 9.83170236e-01
1.000000e+00, 1.00000000e+00
*STEP, INC=400, UNSYMM=YES
*STATIC
1e-4, 1.0, 1e-9, 0.05
*CONTROLS, PARAMETERS=FIELD
1e-4,,,,,,,1e-4
*BOUNDARY, AMPLITUDE=DOPRAMP
CONT, 1, 1, 2.28027074e+01
CONT, 4, 4, 1.14013537e+01
*BOUNDARY
CONT, 2, 3, 0.
WALL, 4, 4, -10.0000
WALL, 2, 2, 0.
NALL, 3, 3, 0.
*NODE PRINT, NSET=NALL, FREQUENCY=999
U
*END STEP
