*HEADING
ex19 3D NMOS electro-thermo-mechanical UEL
*USER ELEMENT, NODES=8, TYPE=U1, PROPERTIES=3, COORDINATES=3, VARIABLES=1, UNSYMM
1,2,3,4,5,6,7
*NODE
1, 1.0000000000e-04, 0.0000000000e+00, -1.0000000000e-06
2, 1.0200000000e-04, 0.0000000000e+00, -1.0000000000e-06
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*ELEMENT, TYPE=U1, ELSET=EOX
1, 1, 2, 32, 31, 61, 62, 92, 91
2, 2, 3, 33, 32, 62, 63, 93, 92
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*ELEMENT, TYPE=U1, ELSET=ENP
117, 241, 242, 294, 293, 345, 346, 398, 397
118, 242, 243, 295, 294, 346, 347, 399, 398
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*ELEMENT, TYPE=U1, ELSET=EPSUB
128, 252, 253, 305, 304, 356, 357, 409, 408
129, 253, 254, 306, 305, 357, 358, 410, 409
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*UEL PROPERTY, ELSET=EOX
0, 0., 2.000000e+02
*UEL PROPERTY, ELSET=ENP
1, 1.000000e+09, 2.000000e+02
*UEL PROPERTY, ELSET=EPSUB
1, -1.000000e+07, 2.000000e+02
*NSET, NSET=SRC
241, 242, 243, 244, 245, 246, 247, 293, 294, 295, 296, 297
298, 299
*NSET, NSET=DRN
286, 287, 288, 289, 290, 291, 292, 338, 339, 340, 341, 342
343, 344
*NSET, NSET=BLK
4401, 4402, 4403, 4404, 4405, 4406
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*NSET, NSET=GATE
1, 2, 3, 4, 5, 6
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*NSET, NSET=OXI
1, 2, 3, 4, 5, 6
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*NSET, NSET=XL
241, 293, 345, 397, 449, 501
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*NSET, NSET=XR
292, 344, 396, 448, 500, 552
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*NSET, NSET=NALL, GENERATE
1, 4504, 1
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*STEP, INC=400, UNSYMM=YES
*STATIC
0.05, 1.0, 1e-9, 0.05
*CONTROLS, PARAMETERS=FIELD
1e-6,,,,,,,
*BOUNDARY
GATE, 1, 1, -1.61180957e+01
GATE, 2, 3, 0.
OXI, 2, 3, 0.
SRC, 1, 1, 2.07232658e+01
SRC, 2, 3, 0.
DRN, 1, 1, 2.07232658e+01
DRN, 2, 2, 0.00000000e+00
DRN, 3, 3, 0.00000000e+00
BLK, 1, 1, -1.61180957e+01
BLK, 2, 3, 0.
BLK, 5, 7, 0.
BLK, 4, 4, 0.
*NODE PRINT, NSET=NALL, FREQUENCY=999
U
*NODE PRINT, NSET=DRN, FREQUENCY=999, TOTALS=YES
RF
*NODE PRINT, NSET=BLK, FREQUENCY=999, TOTALS=YES
RF
*END STEP
*STEP, INC=400, UNSYMM=YES
*STATIC
0.1, 1.0, 1e-9, 0.1
*CONTROLS, PARAMETERS=FIELD
1e-6,,,,,,,
*BOUNDARY
GATE, 1, 1, 9.99360630e+01
GATE, 2, 3, 0.
OXI, 2, 3, 0.
SRC, 1, 1, 2.07232658e+01
SRC, 2, 3, 0.
DRN, 1, 1, 2.07232658e+01
DRN, 2, 2, 0.00000000e+00
DRN, 3, 3, 0.00000000e+00
BLK, 1, 1, -1.61180957e+01
BLK, 2, 3, 0.
BLK, 5, 7, 0.
BLK, 4, 4, 0.
*END STEP
*STEP, INC=400, UNSYMM=YES
*STATIC
0.125, 1.0, 1e-9, 0.125
*CONTROLS, PARAMETERS=FIELD
1e-6,,,,,,,
*BOUNDARY
GATE, 1, 1, 9.99360630e+01
GATE, 2, 3, 0.
OXI, 2, 3, 0.
SRC, 1, 1, 2.07232658e+01
SRC, 2, 3, 0.
DRN, 1, 1, 4.00656256e+01
DRN, 2, 2, 1.93423598e+01
DRN, 3, 3, 1.93423598e+01
BLK, 1, 1, -1.61180957e+01
BLK, 2, 3, 0.
BLK, 5, 7, 0.
BLK, 4, 4, 0.
*END STEP
*STEP, INC=400, UNSYMM=YES
*STATIC
0.125, 1.0, 1e-9, 0.125
*CONTROLS, PARAMETERS=FIELD
1e-6,,,,,,,
*BOUNDARY
GATE, 1, 1, 9.99360630e+01
GATE, 2, 3, 0.
OXI, 2, 3, 0.
SRC, 1, 1, 2.07232658e+01
SRC, 2, 3, 0.
DRN, 1, 1, 5.94079854e+01
DRN, 2, 2, 3.86847195e+01
DRN, 3, 3, 3.86847195e+01
BLK, 1, 1, -1.61180957e+01
BLK, 2, 3, 0.
BLK, 5, 7, 0.
BLK, 4, 4, 0.
*END STEP
*STEP, INC=400, UNSYMM=YES
*STATIC
0.125, 1.0, 1e-9, 0.125
*CONTROLS, PARAMETERS=FIELD
1e-6,,,,,,,
*BOUNDARY
GATE, 1, 1, 9.99360630e+01
GATE, 2, 3, 0.
OXI, 2, 3, 0.
SRC, 1, 1, 2.07232658e+01
SRC, 2, 3, 0.
DRN, 1, 1, 7.87503451e+01
DRN, 2, 2, 5.80270793e+01
DRN, 3, 3, 5.80270793e+01
BLK, 1, 1, -1.61180957e+01
BLK, 2, 3, 0.
BLK, 5, 7, 0.
BLK, 4, 4, 0.
*END STEP
*STEP, INC=400, UNSYMM=YES
*STATIC
0.125, 1.0, 1e-9, 0.125
*CONTROLS, PARAMETERS=FIELD
1e-6,,,,,,,
*BOUNDARY
GATE, 1, 1, 9.99360630e+01
GATE, 2, 3, 0.
OXI, 2, 3, 0.
SRC, 1, 1, 2.07232658e+01
SRC, 2, 3, 0.
DRN, 1, 1, 9.80927049e+01
DRN, 2, 2, 7.73694391e+01
DRN, 3, 3, 7.73694391e+01
BLK, 1, 1, -1.61180957e+01
BLK, 2, 3, 0.
BLK, 5, 7, 0.
BLK, 4, 4, 0.
*END STEP
*STEP, INC=400, UNSYMM=YES
*STATIC
0.125, 1.0, 1e-9, 0.125
*CONTROLS, PARAMETERS=FIELD
1e-6,,,,,,,
*BOUNDARY
GATE, 1, 1, 9.99360630e+01
GATE, 2, 3, 0.
OXI, 2, 3, 0.
SRC, 1, 1, 2.07232658e+01
SRC, 2, 3, 0.
DRN, 1, 1, 1.17435065e+02
DRN, 2, 2, 9.67117988e+01
DRN, 3, 3, 9.67117988e+01
BLK, 1, 1, -1.61180957e+01
BLK, 2, 3, 0.
BLK, 5, 7, 0.
BLK, 4, 4, 0.
*END STEP
*STEP, INC=400, UNSYMM=YES
*STATIC
0.125, 1.0, 1e-9, 0.125
*CONTROLS, PARAMETERS=FIELD
1e-6,,,,,,,
*BOUNDARY
GATE, 1, 1, 9.99360630e+01
GATE, 2, 3, 0.
OXI, 2, 3, 0.
SRC, 1, 1, 2.07232658e+01
SRC, 2, 3, 0.
DRN, 1, 1, 1.36777424e+02
DRN, 2, 2, 1.16054159e+02
DRN, 3, 3, 1.16054159e+02
BLK, 1, 1, -1.61180957e+01
BLK, 2, 3, 0.
BLK, 5, 7, 0.
BLK, 4, 4, 0.
*END STEP
