*HEADING
ex20 uniform n+ resistor bar (ETM UEL element test)
*USER ELEMENT, NODES=8, TYPE=U1, PROPERTIES=3, COORDINATES=3, VARIABLES=1, UNSYMM
1,2,3,4,5,6,7
*NODE
1, 0.0000000000e+00, 0.0000000000e+00, 0.0000000000e+00
2, 2.0000000000e-07, 0.0000000000e+00, 0.0000000000e+00
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*ELEMENT, TYPE=U1, ELSET=EBAR
1, 1, 2, 80, 79, 157, 158, 236, 235
2, 2, 3, 81, 80, 158, 159, 237, 236
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*UEL PROPERTY, ELSET=EBAR
1, 1.000000e+09, 1.0
*NSET, NSET=XL
1, 79, 157, 235
*NSET, NSET=XR
78, 156, 234, 312
*NSET, NSET=NALL, GENERATE
1, 312, 1
*AMPLITUDE, NAME=DOPRAMP, TIME=TOTAL TIME
0.000000e+00, 0.00000000e+00
1.000000e-04, 5.55555556e-01
1.467799e-04, 5.74074074e-01
2.154435e-04, 5.92592593e-01
3.162278e-04, 6.11111111e-01
4.641589e-04, 6.29629630e-01
6.812921e-04, 6.48148148e-01
1.000000e-03, 6.66666667e-01
1.467799e-03, 6.85185185e-01
2.154435e-03, 7.03703704e-01
3.162278e-03, 7.22222222e-01
4.641589e-03, 7.40740741e-01
6.812921e-03, 7.59259259e-01
1.000000e-02, 7.77777778e-01
1.467799e-02, 7.96296296e-01
2.154435e-02, 8.14814815e-01
3.162278e-02, 8.33333333e-01
4.641589e-02, 8.51851852e-01
6.812921e-02, 8.70370370e-01
1.000000e-01, 8.88888889e-01
1.467799e-01, 9.07407407e-01
2.154435e-01, 9.25925926e-01
3.162278e-01, 9.44444444e-01
4.641589e-01, 9.62962963e-01
6.812921e-01, 9.81481481e-01
1.000000e+00, 1.00000000e+00
*STEP, INC=400, UNSYMM=YES
*STATIC
0.0001, 1.0, 1e-9, 0.05
*CONTROLS, PARAMETERS=FIELD
1e-4,,,,,,,
*BOUNDARY, AMPLITUDE=DOPRAMP
XL, 1, 1, 2.07232658e+01
XR, 1, 1, 2.07232658e+01
*BOUNDARY
XL, 2, 2, 0.
XR, 2, 2, 0.00000000e+00
NALL, 3, 3, 0.
XL, 4, 4, 0.
XR, 4, 4, 0.
XL, 5, 7, 0.
*NODE PRINT, NSET=NALL, FREQUENCY=999
U
*NODE PRINT, NSET=XR, FREQUENCY=999, TOTALS=YES
RF
*NODE PRINT, NSET=XL, FREQUENCY=999, TOTALS=YES
RF
*END STEP
*STEP, INC=400, UNSYMM=YES
*STATIC
0.125, 1.0, 1e-9, 0.125
*CONTROLS, PARAMETERS=FIELD
1e-4,,,,,,,
*BOUNDARY
XL, 1, 1, 2.07232658e+01
XR, 1, 1, 2.45917378e+01
*BOUNDARY
XL, 2, 2, 0.
XR, 2, 2, 3.86847195e+00
NALL, 3, 3, 0.
XL, 4, 4, 0.
XR, 4, 4, 0.
XL, 5, 7, 0.
*END STEP
*STEP, INC=400, UNSYMM=YES
*STATIC
0.25, 1.0, 1e-9, 0.25
*CONTROLS, PARAMETERS=FIELD
1e-4,,,,,,,
*BOUNDARY
XL, 1, 1, 2.07232658e+01
XR, 1, 1, 2.45917378e+01
*BOUNDARY
XL, 2, 2, 0.
XR, 2, 2, 3.86847195e+00
NALL, 3, 3, 0.
XL, 4, 4, 0.
XR, 4, 4, 0.
XL, 5, 7, 0.
*END STEP
