*HEADING
ex25 stacked-NS GAAFET (Wang 2023) Lrcs=0.0nm
*USER ELEMENT, NODES=8, TYPE=U1, PROPERTIES=2, COORDINATES=3, VARIABLES=1, UNSYMM
1,2,3
*NODE
1, 1.00000000e-06, 0.00000000e+00, -1.00000000e-07
2, 1.05000000e-06, 0.00000000e+00, -1.00000000e-07
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*ELEMENT, TYPE=U1, ELSET=ENSD
1293, 2107, 2108, 2109, 2110, 2111, 2112, 2113, 2114
1294, 2108, 2115, 2116, 2109, 2112, 2117, 2118, 2113
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*ELEMENT, TYPE=U1, ELSET=ENCH
1298, 1405, 1406, 1407, 1408, 2127, 2129, 2130, 2128
1299, 1406, 1409, 1410, 1407, 2129, 2131, 2132, 2130
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*ELEMENT, TYPE=U1, ELSET=EOX
1, 1, 2, 3, 4, 5, 6, 7, 8
2, 2, 9, 10, 3, 6, 11, 12, 7
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*UEL PROPERTY, ELSET=ENSD
1, 2.000000e+10
*UEL PROPERTY, ELSET=ENCH
1, -1.000000e+05
*UEL PROPERTY, ELSET=EOX
0, 0.
*ELEMENT, TYPE=C3D8, ELSET=VNSD
501293, 2107, 2108, 2109, 2110, 2111, 2112, 2113, 2114
501294, 2108, 2115, 2116, 2109, 2112, 2117, 2118, 2113
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*ELEMENT, TYPE=C3D8, ELSET=VNCH
501298, 1405, 1406, 1407, 1408, 2127, 2129, 2130, 2128
501299, 1406, 1409, 1410, 1407, 2129, 2131, 2132, 2130
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*ELEMENT, TYPE=C3D8, ELSET=VOX
500001, 1, 2, 3, 4, 5, 6, 7, 8
500002, 2, 9, 10, 3, 6, 11, 12, 7
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*ELSET, ELSET=EVIS
VNSD, VNCH, VOX
*MATERIAL, NAME=MDUM
*ELASTIC
1e-20, 0.
*USER OUTPUT VARIABLES
2
*SOLID SECTION, ELSET=EVIS, MATERIAL=MDUM
*NSET, NSET=SRC
2107, 2110, 2111, 2114, 2226, 2228
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*NSET, NSET=DRN
2221, 2222, 2223, 2224, 2282, 2283
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*NSET, NSET=GATE
41, 42, 45, 46, 49, 50
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*NSET, NSET=OXI
1, 2, 3, 4, 5, 6
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*NSET, NSET=NALL, GENERATE
1, 22092, 1
*STEP, INC=400, UNSYMM=YES
*STATIC
0.05, 1.0, 1e-9, 0.05
*CONTROLS, PARAMETERS=FIELD
1e-4,,,,,,,1e-4
*BOUNDARY
SRC, 1, 1, 2.37189981e+01
SRC, 2, 3, 0.
DRN, 1, 1, 2.37189981e+01
DRN, 2, 2, 0.00000000e+00
DRN, 3, 3, 0.00000000e+00
GATE, 1, 1, 0.00000000e+00
OXI, 2, 3, 0.
*END STEP
*STEP, INC=400, UNSYMM=YES
*STATIC
0.1, 1.0, 1e-9, 0.1
*CONTROLS, PARAMETERS=FIELD
1e-4,,,,,,,1e-4
*BOUNDARY
SRC, 1, 1, 2.37189981e+01
SRC, 2, 3, 0.
DRN, 1, 1, 5.07983018e+01
DRN, 2, 2, 2.70793037e+01
DRN, 3, 3, 2.70793037e+01
GATE, 1, 1, -1.54738878e+01
OXI, 2, 3, 0.
*NODE PRINT, NSET=DRN, FREQUENCY=999, TOTALS=YES
RF
*OUTPUT, FIELD, FREQUENCY=999
*NODE OUTPUT
U
*ELEMENT OUTPUT, ELSET=EVIS
UVARM
*END STEP
*STEP, INC=400, UNSYMM=YES
*STATIC
0.25, 1.0, 1e-9, 0.25
*CONTROLS, PARAMETERS=FIELD
1e-4,,,,,,,1e-4
*BOUNDARY
SRC, 1, 1, 2.37189981e+01
SRC, 2, 3, 0.
DRN, 1, 1, 5.07983018e+01
DRN, 2, 2, 2.70793037e+01
DRN, 3, 3, 2.70793037e+01
GATE, 1, 1, -1.16054159e+01
OXI, 2, 3, 0.
*END STEP
*STEP, INC=400, UNSYMM=YES
*STATIC
0.25, 1.0, 1e-9, 0.25
*CONTROLS, PARAMETERS=FIELD
1e-4,,,,,,,1e-4
*BOUNDARY
SRC, 1, 1, 2.37189981e+01
SRC, 2, 3, 0.
DRN, 1, 1, 5.07983018e+01
DRN, 2, 2, 2.70793037e+01
DRN, 3, 3, 2.70793037e+01
GATE, 1, 1, -7.73694391e+00
OXI, 2, 3, 0.
*END STEP
*STEP, INC=400, UNSYMM=YES
*STATIC
0.25, 1.0, 1e-9, 0.25
*CONTROLS, PARAMETERS=FIELD
1e-4,,,,,,,1e-4
*BOUNDARY
SRC, 1, 1, 2.37189981e+01
SRC, 2, 3, 0.
DRN, 1, 1, 5.07983018e+01
DRN, 2, 2, 2.70793037e+01
DRN, 3, 3, 2.70793037e+01
GATE, 1, 1, -3.86847195e+00
OXI, 2, 3, 0.
*END STEP
*STEP, INC=400, UNSYMM=YES
*STATIC
0.25, 1.0, 1e-9, 0.25
*CONTROLS, PARAMETERS=FIELD
1e-4,,,,,,,1e-4
*BOUNDARY
SRC, 1, 1, 2.37189981e+01
SRC, 2, 3, 0.
DRN, 1, 1, 5.07983018e+01
DRN, 2, 2, 2.70793037e+01
DRN, 3, 3, 2.70793037e+01
GATE, 1, 1, -0.00000000e+00
OXI, 2, 3, 0.
*END STEP
*STEP, INC=400, UNSYMM=YES
*STATIC
0.25, 1.0, 1e-9, 0.25
*CONTROLS, PARAMETERS=FIELD
1e-4,,,,,,,1e-4
*BOUNDARY
SRC, 1, 1, 2.37189981e+01
SRC, 2, 3, 0.
DRN, 1, 1, 5.07983018e+01
DRN, 2, 2, 2.70793037e+01
DRN, 3, 3, 2.70793037e+01
GATE, 1, 1, 3.86847195e+00
OXI, 2, 3, 0.
*END STEP
*STEP, INC=400, UNSYMM=YES
*STATIC
0.25, 1.0, 1e-9, 0.25
*CONTROLS, PARAMETERS=FIELD
1e-4,,,,,,,1e-4
*BOUNDARY
SRC, 1, 1, 2.37189981e+01
SRC, 2, 3, 0.
DRN, 1, 1, 5.07983018e+01
DRN, 2, 2, 2.70793037e+01
DRN, 3, 3, 2.70793037e+01
GATE, 1, 1, 7.73694391e+00
OXI, 2, 3, 0.
*END STEP
*STEP, INC=400, UNSYMM=YES
*STATIC
0.25, 1.0, 1e-9, 0.25
*CONTROLS, PARAMETERS=FIELD
1e-4,,,,,,,1e-4
*BOUNDARY
SRC, 1, 1, 2.37189981e+01
SRC, 2, 3, 0.
DRN, 1, 1, 5.07983018e+01
DRN, 2, 2, 2.70793037e+01
DRN, 3, 3, 2.70793037e+01
GATE, 1, 1, 1.16054159e+01
OXI, 2, 3, 0.
*END STEP
*STEP, INC=400, UNSYMM=YES
*STATIC
0.25, 1.0, 1e-9, 0.25
*CONTROLS, PARAMETERS=FIELD
1e-4,,,,,,,1e-4
*BOUNDARY
SRC, 1, 1, 2.37189981e+01
SRC, 2, 3, 0.
DRN, 1, 1, 5.07983018e+01
DRN, 2, 2, 2.70793037e+01
DRN, 3, 3, 2.70793037e+01
GATE, 1, 1, 1.54738878e+01
OXI, 2, 3, 0.
*END STEP
*STEP, INC=400, UNSYMM=YES
*STATIC
0.25, 1.0, 1e-9, 0.25
*CONTROLS, PARAMETERS=FIELD
1e-4,,,,,,,1e-4
*BOUNDARY
SRC, 1, 1, 2.37189981e+01
SRC, 2, 3, 0.
DRN, 1, 1, 5.07983018e+01
DRN, 2, 2, 2.70793037e+01
DRN, 3, 3, 2.70793037e+01
GATE, 1, 1, 1.93423598e+01
OXI, 2, 3, 0.
*END STEP
*STEP, INC=400, UNSYMM=YES
*STATIC
0.25, 1.0, 1e-9, 0.25
*CONTROLS, PARAMETERS=FIELD
1e-4,,,,,,,1e-4
*BOUNDARY
SRC, 1, 1, 2.37189981e+01
SRC, 2, 3, 0.
DRN, 1, 1, 5.07983018e+01
DRN, 2, 2, 2.70793037e+01
DRN, 3, 3, 2.70793037e+01
GATE, 1, 1, 2.32108317e+01
OXI, 2, 3, 0.
*END STEP
*STEP, INC=400, UNSYMM=YES
*STATIC
0.25, 1.0, 1e-9, 0.25
*CONTROLS, PARAMETERS=FIELD
1e-4,,,,,,,1e-4
*BOUNDARY
SRC, 1, 1, 2.37189981e+01
SRC, 2, 3, 0.
DRN, 1, 1, 5.07983018e+01
DRN, 2, 2, 2.70793037e+01
DRN, 3, 3, 2.70793037e+01
GATE, 1, 1, 2.70793037e+01
OXI, 2, 3, 0.
*END STEP
*STEP, INC=400, UNSYMM=YES
*STATIC
0.25, 1.0, 1e-9, 0.25
*CONTROLS, PARAMETERS=FIELD
1e-4,,,,,,,1e-4
*BOUNDARY
SRC, 1, 1, 2.37189981e+01
SRC, 2, 3, 0.
DRN, 1, 1, 5.07983018e+01
DRN, 2, 2, 2.70793037e+01
DRN, 3, 3, 2.70793037e+01
GATE, 1, 1, 3.09477756e+01
OXI, 2, 3, 0.
*END STEP
